finish
/clear

/prep7

et,1,link1

mp,ex,1,6.9*10**10
mp,ex,2,20.7*10**10

r,1,32.3E-4
r,2,38.7E-4
r,3,25.8E-4

n,1,2.54,0
n,2,0,0
n,3,0,2.54

TYPE, 1
MAT,  2
REAL, 2
E,1,2

TYPE, 1
MAT,  1
REAL, 1
E,2,3

TYPE, 1
MAT,  2
REAL, 3
E,1,3

finish
/solu

D,2, ,0, , , ,UX,UY, , , , !
D,3, ,0, , , ,UX,UY, , , , !

F,1,FX,22200
F,1,FY,-111000

solve
finish

/POST1
PLDISP,1 ! displaced structure
PRNSOL, U, COMP ! nodal solution of displacements
FINISH
