FINISH
/CLEAR
/PREP7
ET, 1 , LINK1
R,1,32.3E-4
R,2,38.7E-4
R,3,25.8E-4
MP, EX, 1, 6.9E10
MP, EX, 2, 20.7E10
MP, EX, 3, 20.7E10
N,,0,0
N,,0,2.54
N,,2.54,0
TYPE, 1
MAT, 1
REAL, 1
E, 1, 2
MAT, 2
REAL, 2
E, 1, 3
MAT, 3
REAL, 3
E, 2, 3
FINISH
/SOLU
ANTYPE, STATIC
D,1,UX,0
D,1,UY,0
D,2,UX,0
D,2,UY,0
F,3,FY,-111000
F,3,FX,22200
SOLVE
FINISH
/POST1
PLDISP,1 ! displaced structure PRNSOL, U, COMP ! nodal solution of displacements
FINISH
