FINISH
/CLEAR

/PREP7
ET, 56, BEAM3
R, 56,0.003*0.006, 1/12*0.003*0.006**3, 0.006
MP, EX, 56, 2200E6
MP, DENS, 56, 1100

K, 1, 0, 0, .
K, 2, 0.3, 0, ,

LSTR, 1, 2     ! 兩點連線

TYPE, 56
MAT, 56
REAL, 56
LESIZE,1, , ,70, , , , ,1
LMESH, 1
EPLOT

DK, 1, ALL, 0
FINISH
/SOLU

ANTYPE, HARMIC

! 設定求解法為Full method
HROPT,FULL
HROUT, OFF

HARFRQ,0,500,
NSUBST,100,
KBC,0

! 設定阻尼比為0.01
DMPSTR, 0.01

! 設定力
FK, 2, FY, 0.001
SOLVE
FINISH

/POST1
SET,LIST
