FINISH
/CLEAR

/PREP7
ET,1,BEAM3
R,1,0.4*0.2,1/12*0.2*0.064,0.4,,,,
MP,EX,1,12E9
EP,DENS,1,1500
K,,0,0
K,,6,0
L,      1,      2
TYPE,   1
MAT,       1
REAL,      1
ESIZE,0.05,0,
LMESH,1,
NPLOT
EPLOT

DK,1,ALL,0,,0,
FINISH
/SOLU
ANTYPE,ALL,1
TRUOPT,FULL
OUTRES,ALL,1
ALPHA,0
BRTA,0.006
TIME,0.0001
MSUBUT,2
TIMEINT,OFF


KBC,1
