FINISH
/CLEAR

/FILNAME,heatsink,0
/TITLE,heatsink

/PREP7

ET,1,SOLID70

MP,KXX,1,237
MP,KXX,2,150

WPSTYLE,,,,,,,,1
wpstyle,0.001,0.001,-0.01,0.01,0.001,0,1,,5

BLC4,-0.01,-0.01,0.02,0.002
BLC4,-0.001,-0.008,0.002,0.018
BLC4,0.003,-0.008,0.002,0.018
BLC4,0.007,-0.008,0.002,0.018
BLC4,-0.003,-0.008,-0.002,0.018
BLC4,-0.007,-0.008,-0.002,0.018
BLC4,-0.01,-0.008,0.02,0.002

WPSTYLE,,,,,,,,0

AOVLAP,ALL

AADD,8,10,12,14,16,18,19,20,21,22,23

aplot

VEXT,ALL, , ,0,0,0.02,,,,

vplot

ESIZE,0.001,0,

TYPE,1
MAT,1
VSWEEP,1
VSWEEP,2
VSWEEP,3
VSWEEP,4
VSWEEP,5
VSWEEP,6

TYPE,   1
MAT,   2
VSWEEP,7

eplot

FINISH

/SOLU

ANTYPE,0

/PSF,CONV,HCOE,2,0,1

ASEL,S,EXT,,,,0
ASEL,U,,,54
SFA,ALL,1,CONV,50,25

BFV,7,HGEN, 7.5e6

solve

FINISH

/post1

PLNSOL, TEMP,, 0
