FINISH
/CLEAR

/PREP7
ET, 29, 3
R, 101, 0.003*0.006, 1/12*0.003*0.006**3, 0.006
MP, DENS, 5, 1100
MP, EX, 5, 2200E6

K, 1, 0, 0
K, 2, 0.3, 0
L, 1, 2
TYPE, 29
REAL, 101
MAT, 5

ESIZE, 0.001
LMESH, ALL

DK, 1, ALL, 0
FINISH
/SOLU
!  求解自然頻率
ANTYPE, MODAL ! 設定分析形式，模態
MODOPT,LANB,10,0,500, ,OFF  ! 萃取模式，先濃縮10倍再復原

SOLVE
FINISH
/POST1
SET, LIST
SET,1,1
PLDISP,1
