FINISH
/CLEAR

/FILNAME, EX5-10
/UNITS, SI
/TITLE, Mass-Spring Vibration System
/PREP7
ET, 1, COMBIN14, , , 2            ! 2-D longitudinal spring-damper
ET, 2, MASS21, , , 4              ! 2-D mass without rotary inertia

R, 1, 1000
R, 2, 2000

R, 3, 1
R, 4, 2
R, 5, 3

N, 1, 0, 0
N, 2, 1, 0
N, 3, 2, 0
N, 4, 3, 0
N, 5, 4, 0

TYPE, 1
REAL, 1
E, 1, 2
E, 4, 5

TYPE, 1
REAL, 2
E, 2, 3
E, 3, 4

TYPE, 2
REAL, 3
E, 2

REAL, 4
E, 3

REAL, 5
E, 4
FINISH

/SOLU
ANTYPE, MODAL
MODOPT, LANB, 3
!MODOPT, SUBSP, 3
MXPAND, 3
D, 1, ALL, 0, , 5, 4
D, 2, UY, 0, , 4, 1
SOLVE
FINISH

/POST1
SET, LIST
SET, 1, 1
PLDISP				! 1st mode
SET, 1, 2
PLDISP				! 2nd mode
SET, 1, 3
PLDISP				! 3rd mode
