FINISH
/CLEAR

AREA=40e-4
/PREP7
ET,1,LINK1
R,1, AREA, , , ,

MP,EX,1,200e9
MP,DENS,1,7800

N,1,0,0,,
N,2,4,0,,
N,3,0,2
N,4,4,2

E,1,2
E,1,3
E,1,4
E,2,4
E,3,4

TYPE,1
MAT,1
REAL,1
FINISH

/SOLU
ANTYPE,STATIC
D,2,UX,0, ,0,
D,2,UY,0, ,0,
D,4,UX,0, ,0,
F,3,FY,-50000
SOLVE
FINISH

/POST1
PLDISP,1
