FINISH
/CLEAR

AREA=40e-4
/PREP7
ET,1,LINK1
R,1, AREA, , , ,

MP,EX,1,200e9
MP,DENS,1,7800

N,1,0,0,,
N,2,4,0,,
N,3,0,2
N,4,4,2

E,1,2
E,1,3
E,1,4
E,2,4
E,3,4

TYPE,1
MAT,1
REAL,1
LESIZE,1, , ,10, , , , ,1
LMESH,1
LMESH,2
LMESH,3
LMESH,4
LMESH,5
EPLOT
FINISH

/SOLU
ANTYPE,MODAL
D,2,UX,0, ,0,
D,2,UY,0, ,0,
D,4,UX,0, ,0,
MODOPT,LANB,10,0,300,
MXPAND,10
SOLVE
FINISH

/POST1
SET, LIST
