FINISH
/CLEAR

/PREP7
ET, 1, BEAM3
R, 1, 8E-2, 1.06E-3, 0.4 ,
MP, EX, 1, 12E+9

K, 1, 0, 0
K, 2, 3, 0
K, 3, 4.5, 0
K, 4, 6, 0

LSTR, 1, 2
LSTR, 2, 3
LSTR, 3, 4
ESIZE, 0.2, ,

TYPE, 1
MAT, 1
REAL, 1
LMESH,1,3,1

NPLOT
EPLOT
FINISH

/SOLU
ANTYPE,STATIC

DK,1, ,0, ,0, ALL
LSEL,S, , , 1
ESLL,S
SFBEAM,ALL,1, PRES, 2000
ALLSEL,ALL
FK, 3, FY, -4000
FK, 4, FY, -6000


SOLVE
FINISH

/POST1
PLDISP,1
