FINISH
/CLEAR

B=0.003
H=0.006
AREA=B*H
IZ=(1/12)*B*H*H*H

/PREP7
ET,1,BEAM3
R,1, AREA, IZ ,H , ,

MP,EX,1,2200e6
MP,DENS,1,1100

K,1,0,0,,
K,2,0.3,0,,
LSTR,1,2

TYPE,1
MAT,1
REAL,1
LESIZE,1, , ,10, , , , ,1
LMESH,1
EPLOT

DK,1,UX,0, ,0,
DK,1,UY,0, ,0,
DK,2,UY,0, ,0,
FINISH

/SOLU
ANTYPE,MODAL
MODOPT,LANB,10,0,700
MXPAND,10
SOLVE
FINISH

/POST1
SET,LIST
SET,1,1
PLDISP,1
