FINISH
/CLEAR

/PREP7

ET,1,PLANE42
KEYOPT,1,3,1
MP,EX,1,210000
MP,NUXY,1,0.3
BLC4,200,0,300,1000
ESIZE, ,10
TYPE,1
MAT,1
MSHKEY,1
AMESH,1
EPLOT
FINISH

/SOLU
ANTYPE,STATIC
DL,4, ,SYMM,UX,0
DL,1, ,SYMM	!上下要約束
DL,3, ,SYMM
SFL,2,PRES,1
SOLVE
FINISH

/POST1
PLNSOL,S,X,0,1
PLNSOL,S,Z,0,1
PATH,stress,2,30,60,
PPATH,1,0,200,0,0,0
PPATH,2,0,500,0,0,0
PDEF, ,S,X,AVG
PDEF, ,S,Z,AVG
PLPATH,SX,SZ
PRPATH,SX,SZ
